## Fuzzy Logic Regler
## Lineare Gleichung 1 Grades
LinGl_1(x, x_1, y_1, x_2, y_2) :=
    return 0 if x_1 == x_2
    otherwise
        return
            m ← (y_2 - y_1)/(x_2 - x_1)
            q ← y_1 - m*x_1
            m*x + q
B(x) := LinGl_1(x, 50, 9, 100, 12)
## Kennlinienfeld
# Beschreibung eines linearen Verhaltens aus 4 vorgebenen Punkten (Anwendung Fuzzy Logic)
Kennlinie(x, x_1, x_2, x_3, x_4) :=
    return 0 if x < x_1
    if (x ≥ x_1) and (x ≤ x_2)
        return 1 if x_1 == x_2
        return LinGl_1(x, x_1, 0, x_2, 1)
    return 1 if (x ≥ x_2) and (x ≤ x_3)
    if (x ≥ x_3) and (x ≤ x_4)
        return 1 if x_3 == x_4
        return LinGl_1(x, x_3, 1, x_4, 0)
    return 0
x_1 := -.9
x_2 := -0.7
x_3 := -0.3
x_4 := 0
f(x) := Kennlinie(x, x_1, x_2, x_3, x_4)
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# Beschreibung eines nicht linearen Verlaufes mit Auswahl der Funktion
## Fuzzy Logic
## Parametrisierung der Kennlinienfelder
x_1N := -1.0
x_2N := -1.0
x_3N := -1.0
x_4N := 0
x_1Z := -1
x_2Z := 0
x_3Z := 0
x_4Z := 1
x_1P := 0
x_2P := 1.0
x_3P := 1.0
x_4P := 1.0
f_N(x) := Kennlinie(x, x_1N, x_2N, x_3N, x_4N)
f_Z(x) := Kennlinie(x, x_1Z, x_2Z, x_3Z, x_4Z)
f_P(x) := Kennlinie(x, x_1P, x_2P, x_3P, x_4P)
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## Linguistik Regeln
## Beschickungsregelung
# Regelsatz Beispiel
# FALLS l negativ UND dl negativ DANN Beschickungsoffset negativ
# FALLS l negativ UND dl null DANN Beschickungsoffset negativ
# FALLS l negativ UND dl positiv DANN Beschickungsoffset null
# FALLS l null UND dl negativ DANN Beschickungsoffset negativ
# FALLS l null UND dl null DANN Beschickungsoffset null
# FALLS l null UND dl positiv DANN Beschickungsoffset positiv
# FALLS l positiv UND dl negativ DANN Beschickungsoffset null
# FALLS l positiv UND dl null DANN Beschickungsoffset positiv
# FALLS l positiv UND dl positiv DANN Beschickungsoffset positiv
# Negativ
N := -1.0
# Null
Z := 0
# Positiv
poise := 1.0
Regel_Nr := [1, 2, 3; 4, 5, 6; 7, 8, 9]
Regeln := [N, N, Z; N, Z, poise; N, poise, poise]
fx := 0.3
fy := 0.2
## Wahrheit des Fuzzy Feldes (MIN - Verknüpfung)
R1(λ, dλ) :=
    return f_N(λ) if f_N(λ) ≤ f_N(dλ)
    f_N(dλ) otherwise
R2(λ, dλ) :=
    return f_N(λ) if f_N(λ) ≤ f_Z(dλ)
    f_Z(dλ) otherwise
R3(λ, dλ) :=
    return f_N(λ) if f_N(λ) ≤ f_P(dλ)
    f_P(dλ) otherwise
R4(λ, dλ) :=
    return f_Z(λ) if f_Z(λ) ≤ f_N(dλ)
    f_N(dλ) otherwise
R5(λ, dλ) :=
    return f_Z(λ) if f_Z(λ) ≤ f_Z(dλ)
    f_Z(dλ) otherwise
R6(λ, dλ) :=
    return f_Z(λ) if f_Z(λ) ≤ f_P(dλ)
    f_P(dλ) otherwise
R7(λ, dλ) :=
    return f_P(λ) if f_P(λ) ≤ f_N(dλ)
    f_N(dλ) otherwise
R8(λ, dλ) :=
    return f_P(λ) if f_P(λ) ≤ f_Z(dλ)
    f_Z(dλ) otherwise
R9(λ, dλ) :=
    return f_P(λ) if f_P(λ) ≤ f_P(dλ)
    f_P(dλ) otherwise
# Bestimmung der Ausgangsgrösse
AN(λ, dλ) :=
    S ← 0
    S ← S + R1(λ, dλ) if Regeln[0, 0] == N
    S ← S + R2(λ, dλ) if Regeln[0, 1] == N
    S ← S + R3(λ, dλ) if Regeln[0, 2] == N
    S ← S + R4(λ, dλ) if Regeln[1, 0] == N
    S ← S + R5(λ, dλ) if Regeln[1, 1] == N
    S ← S + R6(λ, dλ) if Regeln[1, 2] == N
    S ← S + R7(λ, dλ) if Regeln[2, 0] == N
    S ← S + R8(λ, dλ) if Regeln[2, 1] == N
    S ← S + R9(λ, dλ) if Regeln[2, 2] == N
    return S
AZ(λ, dλ) :=
    S ← 0
    S ← S + R1(λ, dλ) if Regeln[0, 0] == Z
    S ← S + R2(λ, dλ) if Regeln[0, 1] == Z
    S ← S + R3(λ, dλ) if Regeln[0, 2] == Z
    S ← S + R4(λ, dλ) if Regeln[1, 0] == Z
    S ← S + R5(λ, dλ) if Regeln[1, 1] == Z
    S ← S + R6(λ, dλ) if Regeln[1, 2] == Z
    S ← S + R7(λ, dλ) if Regeln[2, 0] == Z
    S ← S + R8(λ, dλ) if Regeln[2, 1] == Z
    S ← S + R9(λ, dλ) if Regeln[2, 2] == Z
    return S
AP(λ, dλ) :=
    S ← 0
    S ← S + R1(λ, dλ) if Regeln[0, 0] == poise
    S ← S + R2(λ, dλ) if Regeln[0, 1] == poise
    S ← S + R3(λ, dλ) if Regeln[0, 2] == poise
    S ← S + R4(λ, dλ) if Regeln[1, 0] == poise
    S ← S + R5(λ, dλ) if Regeln[1, 1] == poise
    S ← S + R6(λ, dλ) if Regeln[1, 2] == poise
    S ← S + R7(λ, dλ) if Regeln[2, 0] == poise
    S ← S + R8(λ, dλ) if Regeln[2, 1] == poise
    S ← S + R9(λ, dλ) if Regeln[2, 2] == poise
    return S
Gewichtung(λ, dλ) := [R1(λ, dλ), R2(λ, dλ), R3(λ, dλ); R4(λ, dλ), R5(λ, dλ), R6(λ, dλ); R7(λ, dλ), R8(λ, dλ), R9(λ, dλ)]
AN(fx, fy) = 0
AZ(fx, fy) = 0.7
Gewichtung(fx, fy) = [0, 0, 0; 0, 0.7, 0.2; 0, 0.3, 0.2]
AP(fx, fy) = 0.7
# Punktbestimmung
Punkt(AN, AZ, AP) :=
    dN ← AZ - AN
    dP ← AP - AZ
    return (dN + dP)/(AN + AZ + AP)
# vereinfachtes Modell
# der Berechnung
# Darstellung im 3D Raum
f(λ, dλ) := Punkt(AN(λ, dλ), AZ(λ, dλ), AP(λ, dλ))
f(fx, fy) = 0.5
FuzzyLogic_3D := CreateMesh(f, -1, 1, -1, 1, 30)
## Parametrierung Fuzzy Logic Regler
# [component: inputs FuzzyLogic_3D]
Regeln := [Z, Z, poise; Z, Z, Z; Z, Z, N]
fx := 0.3
fy := 0.3
