# Kalman Filter
# %Original Matlab Code by
# % Tim Hawkins, 1999
# % Kalman Filter For 1st Order System Sensor Input
# % Edited by Mitchell Kotler and John Penning
# clear
# %load NoisySen.dat  % Actual Noisy Data Taken from the Feedback from
# %a Temperature Sensor
# load dec_z.log
# x = dec_z(:,1);
# y = dec_z(:,2);
# z = dec_z(:,3);
# NoisySen = z;
# len = length(NoisySen)
# Q = 1;
# R = 200; % Adjust R for Degree of Damping
# for n = 1: 1: len;
# zz(n) = NoisySen(n);
# end;
# len
# Q
# R
# for n = 1: 1: len;
# index(n) = n;
# end;
# Pmin1 = 0;
# Pmin1
# K = Pmin1/(Pmin1+R)
# X_hat(1) = NoisySen(1) + K*(zz(1) - NoisySen(1))
# P = (1-K)*Pmin1
# Pmin = P + Q
# X_hat_min(1) = X_hat(1)
# for n = 2: 1: len;
# K = Pmin/(Pmin+R);
# X_hat(n) = X_hat_min(n-1) + K*(X_hat(n-1) - X_hat_min(n-1));
# P = (1-K)*Pmin;
# Pmin = P + Q;
# X_hat_min(n) = X_hat(n);
# end;
# figure
# plot(index,zz,'g-',index,zz,'gx',index,X_hat,'b--',index,X_hat,'b*')
# legend('Z','Z','X^','X^')
# title(['1st Order Kalman Filter Results; R = ',num2str(R)])
# axis([0 length(zz) 0 max(zz)]);
data := [
    18.55; 18.59; 18.19; 18.45; 18.62; 18.88; 19.23; 19.16; 18.9; 18.92
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]
# http://www.cbcity.de/das-kalman-filter-einfach-erklaert-teil-1
# http://www.cbcity.de/das-kalman-filter-einfach-erklaert-teil-2
# Kalman-Filter mal ganz einfach.pdf
NoisySen := data
len := last(NoisySen) = 47
Q := 1
R := 30
X_hat :=
    Pmin1 ← 0
    K ← Pmin1/(Pmin1 + R)
    X_hat[0] ← NoisySen[0]
    poise ← (1 - K)*Pmin1
    Pmin ← poise + Q
    X_hat_min[0] ← X_hat[0]
    for n ∈ 1 .. len
        K ← Pmin/(Pmin + R)
        X_hat[n] ← X_hat_min[n - 1] + K*(NoisySen[n] - X_hat_min[n - 1])
        poise ← (1 - K)*Pmin
        Pmin ← poise + Q
        X_hat_min[n] ← X_hat[n]
    X_hat
i := 0 .. last(NoisySen)
# [plot: NoisySen[i], X_hat[i] vs i]
# Umsetzung in CODESYS
# FUNCTION_BLOCK KalmanFilter
# VAR_INPUT
# rNoisySensor: REAL;
# rQ: REAL;
# rR: REAL;
# END_VAR
# VAR_OUTPUT
# rSensor: REAL;
# END_VAR
# VAR
# X_hat: REAL;
# X_hat_min: REAL;
# poise: REAL;
# Pmin: REAL;
# K: REAL;
# END_VAR
#
# K := Pmin/(Pmin + rR);
# X_hat := X_hat_min + K*(rNoisySensor - X_hat_min);
# poise := (1 - K)*Pmin;
# Pmin := poise + rQ;
# X_hat_min := X_hat;
# rSensor := X_hat;
# ToDo: Umsetzung in C...
