# PID - Algorithmus im Zeitbereich
# Beschreibung der Grundfunktionen als Differenzengleichungen für die Umsetzung in einen programmierbaren Rechner (SPS) mit diskretem Zeitverhalten.
SP := 2^10  # Sampling Points
τe := 20  # Zeitfenster [s]
Δτ := τe/SP = 0.0195312  # Samplingtime[s]
τ := 0 .. SP  # Laufvariable
# Schrittfunktion
step(t, ts_1, te_1, ts_2, te_2) :=
    out ← 0
    if (t ≥ ts_1) and (t ≤ te_1)
        out ← 1
    else
        if (t ≥ ts_2) and (t ≤ te_2)
            out ← 1
        else
            out ← 0
    return out
t_s1 := 0 + Δτ
t_e1 := 5
t_s2 := 10
t_e2 := 15
x_e[τ] := step(τ*Δτ, t_s1, t_e1, t_s2, t_e2)
# [plot: x_e[τ] vs τ*Δτ]
# PID
PID(K_R, T_N, T_V, T_Vz, x) :=
    "Nullsetzen der Variablen"
    proportional ← 0
    integral ← 0
    dx ← 0
    dy ← 0
    for n ∈ 0 .. rows(x)
        y[n] ← 0
        differential[n] ← 0
    "Bestimmung der Schrittantwort"
    for n ∈ 1 .. (rows(x) - 1)
        "P-Anteil"
        proportional ← K_R*x[n]
        "I-Anteil"
        integral ← integral + K_R/T_N*x[n]*Δτ
        "DT1-Anteil"
        dx ← T_V*(x_e[n] - x_e[n - 1])
        dy ← dx/T_Vz
        differential[n] ← differential[n - 1] - differential[n - 1]/T_Vz*Δτ + dy
        "Summation der Teilfaktoren"
        y[n] ← proportional + integral + differential[n]
    return y
K_R := 1
T_N := 1
T_V := 1
T_Vz := 0.25
y := PID(K_R, T_N, T_V, T_Vz, x_e)
# [plot: x_e[τ], y[τ] vs τ*Δτ]
