# Beschreibung Regelkreise
# für Biomassefeuerungen
# Toolbox
# Lineare Gleichung 1 Grades
LinGl_1(x, x_1, y_1, x_2, y_2) :=
    if x_1 == x_2
        return 0
    else
        return
            m ← (y_2 - y_1)/(x_2 - x_1)
            q ← y_1 - m*x_1
            m*x + q
B(x) := LinGl_1(x, 50, 9, 100, 12)
# [plot: B(x) vs x]
# Exponentielle Verstärkung
Exp(a, b, c, d, x) := a*b^(c*x) + d
Exp1(x) := Exp(1, e, 0.0265, 0, x)
Exp2(x) := Exp(15, e, -0.0265, 6, x)
Exp3(x) := Exp(1, 2, 0.05, 0, x)
Exp4(x) := Exp(15, 4, -0.05, 8, x)
# [plot: Exp1(x), Exp2(x), Exp3(x), Exp4(x) vs x]
# Sättigungsverhalten
Sat(a, b, c, d, x) := a*(1 - b^(x/c)) + d
Sat1(x) := Sat(1, e, 30, 25, x)
Sat2(x) := Sat(1, 2, 30, 25, x)
Sat3(x) := Sat(1, 6, 60, 25, x)
Sat4(x) := Sat(1, 2, 30, 10, x)
# [plot: Sat1(x), Sat2(x), Sat3(x), Sat4(x) vs x]
# Vorgabefunktion
# Programm für Anpassungen der Eingangsfunktion
# Lineares Verhalten
# Eponentielles
# Sättigung
# Lookup Table
Given(Typ, x, Parameter) :=
    if Typ == "LinGl_1"
        x_1 ← Parameter[:, 0][0]
        y_1 ← Parameter[:, 1][0]
        x_2 ← Parameter[:, 2][0]
        y_2 ← Parameter[:, 3][0]
        return LinGl_1(x, x_1, y_1, x_2, y_2)
    if Typ == "Exponent"
        a ← Parameter[:, 0][0]
        b ← Parameter[:, 1][0]
        c ← Parameter[:, 2][0]
        d ← Parameter[:, 3][0]
        return Exp(a, b, c, d, x)
    if Typ == "Sätigung"
        a ← Parameter[:, 0][0]
        b ← Parameter[:, 1][0]
        c ← Parameter[:, 2][0]
        d ← Parameter[:, 3][0]
        return Sat(a, b, c, d, x)
    return -1
Parameter := [0, 10, 100, 0, 0, 0, 0, 0, 0, 0]
Vrg1(x) := Given("LinGl_1", x, Parameter)
Parameter := [1, e, 0.0265, 0, 0, 0, 0, 0, 0, 0]
Vrg2(x) := Given("Exponent", x, Parameter)
Parameter := [1, e, 30, 25, 0, 0, 0, 0, 0, 0]
Vrg3(x) := Given("Sätigung", x, Parameter)
# [plot: Vrg1(x), Vrg2(x), Vrg3(x) vs x]
# Kennlinienfeld
# Beschreibung eines linearen Verhaltens aus 4 vorgebenen Punkten (Anwendung Fuzzy Logic)
Kennlinie(x, x_1, x_2, x_3, x_4) :=
    if x < x_1
        return 0
    if (x ≥ x_1) and (x ≤ x_2)
        if x_1 == x_2
            return 1
        return LinGl_1(x, x_1, 0, x_2, 1)
    if (x ≥ x_2) and (x ≤ x_3)
        return 1
    if (x ≥ x_3) and (x ≤ x_4)
        if x_3 == x_4
            return 1
        return LinGl_1(x, x_3, 1, x_4, 0)
    return 0
x_1 := -.9
x_2 := -0.7
x_3 := -0.3
x_4 := 0
f.(x) := Kennlinie(x, x_1, x_2, x_3, x_4)
# [plot: f.(x) vs x]
# Beschreibung eines nicht linearen Verlaufes mit Auswahl der Funktion
# Schrittfunktion
ω := 0.01, 0.02 .. 1000  # Betrachteter Frequenbereich Bode Diagramm
# Zeitfenster
τe := 30
SP := 2^10
Δτ := τe/SP
Δτ =  # no stored result
τ := 0 .. SP
Step(tonne, ts, te) :=
    if (tonne ≥ ts) and (tonne ≤ te)
        1
    else
        0
t_s := 3
t_e := 21
# [plot: Step(τ*Δτ, t_s, t_e) vs τ*Δτ]
# PT_1
K_p := 1.0
T_1 := 1.0
# Zeitbereich
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PT_1(K_p, T_1, x_e) :=
    for n ∈ 0 .. rows(x_e)
        x_a[n] ← 0
    for n ∈ 0 .. (rows(x_e) - 1)
        x_a[n + 1] ← x_a[n] + (-x_a[n] + K_p*x_e[n])/T_1*Δτ
    return x_a
x_e[τ] := Step(τ*Δτ, t_s, t_e)
# T1. bei 63% der Ausgangsgrösse!!
x_a := PT_1(K_p, T_1, x_e)
# [plot: x_e[τ], x_a[τ] vs τ*Δτ]
# Frequenzbereich
G := K_p/(1 + T_1*p)  # disabled
PT_1p(K_p, T_1, ω) := K_p/(1 + T_1*1j*ω)
PT_1dB(K_p, T_1, ω) := 20*log(|K_p/(1 + T_1*1j*ω)|)
PT_1ϕ(K_p, T_1, ω) := arg(K_p/(1 + T_1*1j*ω))*180/π
# [plot: PT_1dB(K_p, T_1, ω) vs ω]
# [plot: PT_1ϕ(K_p, T_1, ω) vs ω]
# [polar plot: arg(PT_1p(K_p, T_1, ω)), |PT_1p(K_p, T_1, ω)|]
# PI
K_R := 1.0
T_N := 5
# Zeitbereich
y(tonne) := K_r*(x_e(tonne) + 1/T_N*integral(x_e(tonne), tonne))  # disabled
PI(K_R, T_N, x_e) :=
    int ← 0
    for n ∈ 0 .. rows(x_e)
        x_a[n] ← 0
    for n ∈ 0 .. (rows(x_e) - 1)
        int ← int + K_R/T_N*(x_e[n]*Δτ)
        x_a[n + 1] ← K_R*x_e[n] + int
    return x_a
x_e[τ] := Step(τ*Δτ, t_s, t_e)
x_a := PI(K_R, T_N, x_e)
# [plot: x_e[τ], x_a[τ] vs τ*Δτ]
7
# Frequenzbereich
G := K_p/(1 + T_1*p)  # disabled
PT_1p(K_p, T_1, ω) := K_p/(1 + T_1*1j*ω)
PT_1dB(K_p, T_1, ω) := 20*log(|K_p/(1 + T_1*1j*ω)|)
PT_1ϕ(K_p, T_1, ω) := arg(K_p/(1 + T_1*1j*ω))*180/π
# [plot: PT_1dB(K_p, T_1, ω) vs ω]
# [plot: PT_1ϕ(K_p, T_1, ω) vs ω]
# [polar plot: arg(PT_1p(K_p, T_1, ω)), |PT_1p(K_p, T_1, ω)|]
# Hlk
# Regler Vorlaufmischer
Rh_Calc(Δ, x_1, y_1, x_2, y_2, Min, Zyklus) :=
    Given ← LinGl_1(Δ, x_1, y_1, x_2, y_2)
    if Given < Min
        Given ← 0
    if (Given > (Zyklus - Min)) and (Given < Zyklus)
        Given ← Zyklus - Min
    if Given > Zyklus
        Given ← Zyklus
    Given
Rh(Δ) := Rh_Calc(|Δ|, 0, 0, 10, 10, 1, 10)
# [plot: Rh(ΔT) vs ΔT]
# Heizkurve
Hk(m, T_p, T_a) := -1*m*T_a + T_p + m*15
# [plot: Hk(0.7, 20, T_a), Hk(1, 25, T_a), Hk(1.3, 30, T_a), Hk(1.7, 35, T_a), Hk(2, 40, T_a) vs T_a]
# Fuzzy Logic
# Parametrisierung der Kennlinienfelder
x_1N := -1.0
x_2N := -1.0
x_3N := -1.0
x_4N := 0
x_1Z := -1
x_2Z := 0
x_3Z := 0
x_4Z := 1
x_1P := 0
x_2P := 1.0
x_3P := 1.0
x_4P := 1.0
f_N(x) := Kennlinie(x, x_1N, x_2N, x_3N, x_4N)
f_Z(x) := Kennlinie(x, x_1Z, x_2Z, x_3Z, x_4Z)
f_P(x) := Kennlinie(x, x_1P, x_2P, x_3P, x_4P)
# [plot: f_N(x), f_Z(x), f_P(x) vs x]
# Linguistik Regeln
# Beschickungsregelung
# Regelsatz Beispiel
# - FALLS l negativ UND dl negativ DANN Beschickungsoffset negativ
# - FALLS l negativ UND dl null DANN Beschickungsoffset negativ
# - FALLS l negativ UND dl positiv DANN Beschickungsoffset null
# - FALLS l null UND dl negativ DANN Beschickungsoffset negativ
# - FALLS l null UND dl null DANN Beschickungsoffset null
# - FALLS l null UND dl positiv DANN Beschickungsoffset positiv
# - FALLS l positiv UND dl negativ DANN Beschickungsoffset null
# - FALLS l positiv UND dl null DANN Beschickungsoffset positiv
# - FALLS l positiv UND dl positiv DANN Beschickungsoffset positiv
# Negativ
N := -1.0
# Null
Z := 0
# Positiv
poise := 1.0
Regel_Nr := [1, 2, 3; 4, 5, 6; 7, 8, 9]
Regeln := [N, N, Z; N, Z, poise; N, poise, poise]
fx := 0.3
fy := 0.2
# Wahrheit des Fuzzy Feldes (MIN - Verknüpfung)
R1(λ, dλ) :=
    if f_N(λ) ≤ f_N(dλ)
        return f_N(λ)
    else
        f_N(dλ)
R2(λ, dλ) :=
    if f_N(λ) ≤ f_Z(dλ)
        return f_N(λ)
    else
        f_Z(dλ)
R3(λ, dλ) :=
    if f_N(λ) ≤ f_P(dλ)
        return f_N(λ)
    else
        f_P(dλ)
R4(λ, dλ) :=
    if f_Z(λ) ≤ f_N(dλ)
        return f_Z(λ)
    else
        f_N(dλ)
R5(λ, dλ) :=
    if f_Z(λ) ≤ f_Z(dλ)
        return f_Z(λ)
    else
        f_Z(dλ)
R6(λ, dλ) :=
    if f_Z(λ) ≤ f_P(dλ)
        return f_Z(λ)
    else
        f_P(dλ)
R7(λ, dλ) :=
    if f_P(λ) ≤ f_N(dλ)
        return f_P(λ)
    else
        f_N(dλ)
R8(λ, dλ) :=
    if f_P(λ) ≤ f_Z(dλ)
        return f_P(λ)
    else
        f_Z(dλ)
R9(λ, dλ) :=
    if f_P(λ) ≤ f_P(dλ)
        return f_P(λ)
    else
        f_P(dλ)
# Bestimmung der Ausgangsgrösse
AN(λ, dλ) :=
    S ← 0
    if Regeln[0, 0] == N
        S ← S + R1(λ, dλ)
    if Regeln[0, 1] == N
        S ← S + R2(λ, dλ)
    if Regeln[0, 2] == N
        S ← S + R3(λ, dλ)
    if Regeln[1, 0] == N
        S ← S + R4(λ, dλ)
    if Regeln[1, 1] == N
        S ← S + R5(λ, dλ)
    if Regeln[1, 2] == N
        S ← S + R6(λ, dλ)
    if Regeln[2, 0] == N
        S ← S + R7(λ, dλ)
    if Regeln[2, 1] == N
        S ← S + R8(λ, dλ)
    if Regeln[2, 2] == N
        S ← S + R9(λ, dλ)
    return S
AZ(λ, dλ) :=
    S ← 0
    if Regeln[0, 0] == Z
        S ← S + R1(λ, dλ)
    if Regeln[0, 1] == Z
        S ← S + R2(λ, dλ)
    if Regeln[0, 2] == Z
        S ← S + R3(λ, dλ)
    if Regeln[1, 0] == Z
        S ← S + R4(λ, dλ)
    if Regeln[1, 1] == Z
        S ← S + R5(λ, dλ)
    if Regeln[1, 2] == Z
        S ← S + R6(λ, dλ)
    if Regeln[2, 0] == Z
        S ← S + R7(λ, dλ)
    if Regeln[2, 1] == Z
        S ← S + R8(λ, dλ)
    if Regeln[2, 2] == Z
        S ← S + R9(λ, dλ)
    return S
AP(λ, dλ) :=
    S ← 0
    if Regeln[0, 0] == poise
        S ← S + R1(λ, dλ)
    if Regeln[0, 1] == poise
        S ← S + R2(λ, dλ)
    if Regeln[0, 2] == poise
        S ← S + R3(λ, dλ)
    if Regeln[1, 0] == poise
        S ← S + R4(λ, dλ)
    if Regeln[1, 1] == poise
        S ← S + R5(λ, dλ)
    if Regeln[1, 2] == poise
        S ← S + R6(λ, dλ)
    if Regeln[2, 0] == poise
        S ← S + R7(λ, dλ)
    if Regeln[2, 1] == poise
        S ← S + R8(λ, dλ)
    if Regeln[2, 2] == poise
        S ← S + R9(λ, dλ)
    return S
Gewichtung(λ, dλ) := [R1(λ, dλ), R2(λ, dλ), R3(λ, dλ); R4(λ, dλ), R5(λ, dλ), R6(λ, dλ); R7(λ, dλ), R8(λ, dλ), R9(λ, dλ)]
Gewichtung(fx, fy) =  # no stored result
AN(fx, fy) =  # no stored result
AZ(fx, fy) =  # no stored result
AP(fx, fy) =  # no stored result
# Punktbestimmung
Punkt(AN, AZ, AP) :=
    dN ← AZ - AN
    dP ← AP - AZ
    return (dN + dP)/(AN + AZ + AP)
# Darstellung im 3D Raum
f(λ, dλ) := Punkt(AN(λ, dλ), AZ(λ, dλ), AP(λ, dλ))
f(fx, fy) =  # no stored result
FuzzyLogic_3D := CreateMesh(f, -1, 1, -1, 1, 30)
# Parametrierung Fuzzy Logic Regler
# [3D plot: FuzzyLogic_3D]
# Normierung der Eingangsgrössen für den Fuzzy Regler
# Bereich für die Normierung von -1 bis +1
Normierung(x, Minus, Null, Plus) :=
    if (x ≥ Minus) and (x ≤ Null)
        Norm ← LinGl_1(x, Minus, -1, Null, 0)
    if (x ≥ Null) and (x ≤ Plus)
        Norm ← LinGl_1(x, Null, 0, Plus, 1)
    if x < Minus
        Norm ← -1
    if x == Null
        Norm ← 0
    if x > Plus
        Norm ← 1
    return Norm
Minus := 0.5
Null := 2
Plus := 5
Norm_x(x) := Normierung(x, Minus, Null, Plus)
Norm_y(x) := Normierung(x, Minus, Null, Plus)
# [plot: Norm_y(x), -1, 0, 1 vs x, Minus, Null, Plus]
# Fuzzy Logic Advanced
# Parametrisierung der Gewichtungsfunktion
x_1N := -1.0
x_2N := -1.0
x_3N := -1.0
x_4N := 0
x_1Z := -1
x_2Z := 0
x_3Z := 0
x_4Z := 1
x_1P := 0
x_2P := 1.0
x_3P := 1.0
x_4P := 1.0
f_N(x) := Kennlinie(x, x_1N, x_2N, x_3N, x_4N)
f_Z(x) := Kennlinie(x, x_1Z, x_2Z, x_3Z, x_4Z)
f_P(x) := Kennlinie(x, x_1P, x_2P, x_3P, x_4P)
# [plot: f_N(x), f_Z(x), f_P(x) vs x]
# Linguistik Regeln
# Beschickungsregelung
# Regelsatz Beispiel
# - FALLS x negativ UND y negativ DANN z negativ
# - FALLS x negativ UND y null DANN z negativ
# - FALLS x negativ UND y positiv DANN z null
# - FALLS x null UND y negativ DANN z negativ
# - FALLS x null UND y null DANN z null
# - FALLS x null UND y positiv DANN z positiv
# - FALLS x positiv UND y negativ DANN z null
# - FALLS x positiv UND y null DANN z positiv
# - FALLS x positiv UND y positiv DANN z positiv
# Negativ
N := -1.0
# Null
Z := 0
# Positiv
poise := 1.0
Regel_Nr := [1, 2, 3; 4, 5, 6; 7, 8, 9]
Regeln ≡ [N, N, Z; N, Z, poise; N, poise, poise]  # disabled
Regeln := [poise, N, poise; N, Z, poise; N, poise, poise]
fx := 0.3
fy := 0.2
# Wahrheit des Fuzzy Feldes (MIN - Verknüpfung)
R1(λ, dλ) :=
    if f_N(λ) ≤ f_N(dλ)
        return f_N(λ)
    else
        f_N(dλ)
R2(λ, dλ) :=
    if f_N(λ) ≤ f_Z(dλ)
        return f_N(λ)
    else
        f_Z(dλ)
R3(λ, dλ) :=
    if f_N(λ) ≤ f_P(dλ)
        return f_N(λ)
    else
        f_P(dλ)
R4(λ, dλ) :=
    if f_Z(λ) ≤ f_N(dλ)
        return f_Z(λ)
    else
        f_N(dλ)
R5(λ, dλ) :=
    if f_Z(λ) ≤ f_Z(dλ)
        return f_Z(λ)
    else
        f_Z(dλ)
R6(λ, dλ) :=
    if f_Z(λ) ≤ f_P(dλ)
        return f_Z(λ)
    else
        f_P(dλ)
R7(λ, dλ) :=
    if f_P(λ) ≤ f_N(dλ)
        return f_P(λ)
    else
        f_N(dλ)
R8(λ, dλ) :=
    if f_P(λ) ≤ f_Z(dλ)
        return f_P(λ)
    else
        f_Z(dλ)
R9(λ, dλ) :=
    if f_P(λ) ≤ f_P(dλ)
        return f_P(λ)
    else
        f_P(dλ)
# Bestimmung der Ausgangsgrösse
AN(λ, dλ) :=
    S ← 0
    if Regeln[0, 0] == N
        S ← S + R1(λ, dλ)
    if Regeln[0, 1] == N
        S ← S + R2(λ, dλ)
    if Regeln[0, 2] == N
        S ← S + R3(λ, dλ)
    if Regeln[1, 0] == N
        S ← S + R4(λ, dλ)
    if Regeln[1, 1] == N
        S ← S + R5(λ, dλ)
    if Regeln[1, 2] == N
        S ← S + R6(λ, dλ)
    if Regeln[2, 0] == N
        S ← S + R7(λ, dλ)
    if Regeln[2, 1] == N
        S ← S + R8(λ, dλ)
    if Regeln[2, 2] == N
        S ← S + R9(λ, dλ)
    return S
AZ(λ, dλ) :=
    S ← 0
    if Regeln[0, 0] == Z
        S ← S + R1(λ, dλ)
    if Regeln[0, 1] == Z
        S ← S + R2(λ, dλ)
    if Regeln[0, 2] == Z
        S ← S + R3(λ, dλ)
    if Regeln[1, 0] == Z
        S ← S + R4(λ, dλ)
    if Regeln[1, 1] == Z
        S ← S + R5(λ, dλ)
    if Regeln[1, 2] == Z
        S ← S + R6(λ, dλ)
    if Regeln[2, 0] == Z
        S ← S + R7(λ, dλ)
    if Regeln[2, 1] == Z
        S ← S + R8(λ, dλ)
    if Regeln[2, 2] == Z
        S ← S + R9(λ, dλ)
    return S
AP(λ, dλ) :=
    S ← 0
    if Regeln[0, 0] == poise
        S ← S + R1(λ, dλ)
    if Regeln[0, 1] == poise
        S ← S + R2(λ, dλ)
    if Regeln[0, 2] == poise
        S ← S + R3(λ, dλ)
    if Regeln[1, 0] == poise
        S ← S + R4(λ, dλ)
    if Regeln[1, 1] == poise
        S ← S + R5(λ, dλ)
    if Regeln[1, 2] == poise
        S ← S + R6(λ, dλ)
    if Regeln[2, 0] == poise
        S ← S + R7(λ, dλ)
    if Regeln[2, 1] == poise
        S ← S + R8(λ, dλ)
    if Regeln[2, 2] == poise
        S ← S + R9(λ, dλ)
    return S
Gewichtung(λ, dλ) := [R1(λ, dλ), R2(λ, dλ), R3(λ, dλ); R4(λ, dλ), R5(λ, dλ), R6(λ, dλ); R7(λ, dλ), R8(λ, dλ), R9(λ, dλ)]
Gewichtung(fx, fy) =  # no stored result
AN(fx, fy) =  # no stored result
AZ(fx, fy) =  # no stored result
AP(fx, fy) =  # no stored result
# Punktbestimmung
Punkt(AN, AZ, AP) :=
    dN ← AZ - AN
    dP ← AP - AZ
    return (dN + dP)/(AN + AZ + AP)
# Darstellung im 3D Raum
f(x, y) := Punkt(AN(Norm_x(x), Norm_y(y)), AZ(Norm_x(x), Norm_y(y)), AP(Norm_x(x), Norm_y(y)))
f(fx, fy) =  # no stored result
f(2, 1.1) =  # no stored result
FuzzyLogic_3D := CreateMesh(f, 1, 3, 1, 3)
# Parametrierung Fuzzy Logic Regler
# [3D plot: FuzzyLogic_3D]
# [contour plot: FuzzyLogic_3D]
# Reglerinschränkung in Abhängigkeit des Abgaswertes
# Bei der Leistungsregulierung Abgastemperatur mitberücksichtigen
x_1A := 0.3
x_2A := 0.8
f_A(x) := -1*Kennlinie(x, x_1A, x_2A, 1, 1)
# [plot: f_A(x) vs x]
