# Beschreibung Regelkreise
# für Biomassefeuerungen
# [area: Toolbox]
## Toolbox
## Lineare Gleichung 1 Grades
LinGl_1(x, x_1, y_1, x_2, y_2) :=
    return 0 if x_1 == x_2
    otherwise
        return
            m ← (y_2 - y_1)/(x_2 - x_1)
            q ← y_1 - m*x_1
            m*x + q
B(x) := LinGl_1(x, 50, 9, 100, 12)
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## Exponentielle Verstärkung
Exp(a, b, c, d, x) := a*b^(c*x) + d
Exp1(x) := Exp(1, e, 0.0265, 0, x)
Exp2(x) := Exp(15, e, -0.0265, 6, x)
Exp3(x) := Exp(1, 2, 0.05, 0, x)
Exp4(x) := Exp(15, 4, -0.05, 8, x)
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## Sättigungsverhalten
Sat(a, b, c, d, x) := a*(1 - b^(x/c)) + d
Sat1(x) := Sat(1, e, 30, 25, x)
Sat2(x) := Sat(1, 2, 30, 25, x)
Sat3(x) := Sat(1, 6, 60, 25, x)
Sat4(x) := Sat(1, 2, 30, 10, x)
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## Vorgabefunktion
# Programm für Anpassungen der Eingangsfunktion
# Lineares Verhalten
# Eponentielles
# Sättigung
# Lookup Table
Vorgabe(Typ, x, Parameter) :=
    if Typ == "LinGl_1"
        x_1 ← Parameter[:, 0][0]
        y_1 ← Parameter[:, 1][0]
        x_2 ← Parameter[:, 2][0]
        y_2 ← Parameter[:, 3][0]
        return LinGl_1(x, x_1, y_1, x_2, y_2)
    if Typ == "Exponent"
        a ← Parameter[:, 0][0]
        b ← Parameter[:, 1][0]
        c ← Parameter[:, 2][0]
        d ← Parameter[:, 3][0]
        return Exp(a, b, c, d, x)
    if Typ == "Sätigung"
        a ← Parameter[:, 0][0]
        b ← Parameter[:, 1][0]
        c ← Parameter[:, 2][0]
        d ← Parameter[:, 3][0]
        return Sat(a, b, c, d, x)
    return -1
Parameter := [0, 10, 100, 0, 0, 0, 0, 0, 0, 0]
Vrg1(x) := Vorgabe("LinGl_1", x, Parameter)
Parameter := [1, e, 0.0265, 0, 0, 0, 0, 0, 0, 0]
Vrg2(x) := Vorgabe("Exponent", x, Parameter)
Parameter := [1, e, 30, 25, 0, 0, 0, 0, 0, 0]
Vrg3(x) := Vorgabe("Sätigung", x, Parameter)
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## Kennlinienfeld
# Beschreibung eines linearen Verhaltens aus 4 vorgebenen Punkten (Anwendung Fuzzy Logic)
Kennlinie(x, x_1, x_2, x_3, x_4) :=
    return 0 if x < x_1
    if (x ≥ x_1) and (x ≤ x_2)
        return 1 if x_1 == x_2
        return LinGl_1(x, x_1, 0, x_2, 1)
    return 1 if (x ≥ x_2) and (x ≤ x_3)
    if (x ≥ x_3) and (x ≤ x_4)
        return 1 if x_3 == x_4
        return LinGl_1(x, x_3, 1, x_4, 0)
    return 0
x_1 := -.9
x_2 := -0.7
x_3 := -0.3
x_4 := 0
f(x) := Kennlinie(x, x_1, x_2, x_3, x_4)
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# Beschreibung eines nicht linearen Verlaufes mit Auswahl der Funktion
## Schrittfunktion
ω := 0.01, 0.02 .. 1000  # Betrachteter Frequenbereich Bode Diagramm
τe := 30  # Zeitfenster
SP := 2^10
Δτ := τe/SP
Δτ = 0.0292969
τ := 0 .. SP
Step(t, ts, te) :=
    1 if (t ≥ ts) and (t ≤ te)
    0 otherwise
t_s := 3
t_e := 21
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## PT_1
K_p := 1.0
T_1 := 1.0
## Zeitbereich
T_1*dx_a/dt + x_a := K_p*x_e  # disabled
PT_1(K_p, T_1, x_e) :=
    for n ∈ 0 .. rows(x_e)
        x_a[n] ← 0
    for n ∈ 0 .. (rows(x_e) - 1)
        x_a[n + 1] ← x_a[n] + (-x_a[n] + K_p*x_e[n])/T_1*Δτ
    return x_a
x_e[τ] := Step(τ*Δτ, t_s, t_e)
x_a := PT_1(K_p, T_1, x_e)  # T1. bei 63% der Ausgangsgrösse!!
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## Frequenzbereich
G := K_p/(1 + T_1*p)  # disabled
PT_1p(K_p, T_1, ω) := K_p/(1 + T_1*1j*ω)
PT_1dB(K_p, T_1, ω) := 20*log(|K_p/(1 + T_1*1j*ω)|)
PT_1φ(K_p, T_1, ω) := arg(K_p/(1 + T_1*1j*ω))*180/π
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## PI
K_R := 1.0
T_N := 5
## Zeitbereich
y(t) := K_r*(x_e(t) + 1/T_N*integral(x_e(t), t))  # disabled
PI(K_R, T_N, x_e) :=
    int ← 0
    for n ∈ 0 .. rows(x_e)
        x_a[n] ← 0
    for n ∈ 0 .. (rows(x_e) - 1)
        int ← int + K_R/T_N*(x_e[n]*Δτ)
        x_a[n + 1] ← K_R*x_e[n] + int
    return x_a
x_e[τ] := Step(τ*Δτ, t_s, t_e)
x_a := PI(K_R, T_N, x_e)
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7
## Frequenzbereich
G := K_p/(1 + T_1*p)  # disabled
PT_1p(K_p, T_1, ω) := K_p/(1 + T_1*1j*ω)
PT_1dB(K_p, T_1, ω) := 20*log(|K_p/(1 + T_1*1j*ω)|)
PT_1φ(K_p, T_1, ω) := arg(K_p/(1 + T_1*1j*ω))*180/π
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# [area: HLK]
## Hlk
## Regler Vorlaufmischer
Rh_Calc(Δ, x_1, y_1, x_2, y_2, Min, Zyklus) :=
    Vorgabe ← LinGl_1(Δ, x_1, y_1, x_2, y_2)
    Vorgabe ← 0 if Vorgabe < Min
    Vorgabe ← Zyklus - Min if (Vorgabe > (Zyklus - Min)) and (Vorgabe < Zyklus)
    Vorgabe ← Zyklus if Vorgabe > Zyklus
    Vorgabe
Rh(Δ) := Rh_Calc(|Δ|, 0, 0, 10, 10, 1, 10)
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## Heizkurve
Hk(m, T_p, T_a) := -1*m*T_a + T_p + m*15
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# [area: Fuzzy Logic Basic]
## Fuzzy Logic
## Parametrisierung der Kennlinienfelder
x_1N := -1.0
x_2N := -1.0
x_3N := -1.0
x_4N := 0
x_1Z := -1
x_2Z := 0
x_3Z := 0
x_4Z := 1
x_1P := 0
x_2P := 1.0
x_3P := 1.0
x_4P := 1.0
f_N(x) := Kennlinie(x, x_1N, x_2N, x_3N, x_4N)
f_Z(x) := Kennlinie(x, x_1Z, x_2Z, x_3Z, x_4Z)
f_P(x) := Kennlinie(x, x_1P, x_2P, x_3P, x_4P)
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## Linguistik Regeln
## Beschickungsregelung
# Regelsatz Beispiel
# FALLS l negativ UND dl negativ DANN Beschickungsoffset negativ
# FALLS l negativ UND dl null DANN Beschickungsoffset negativ
# FALLS l negativ UND dl positiv DANN Beschickungsoffset null
# FALLS l null UND dl negativ DANN Beschickungsoffset negativ
# FALLS l null UND dl null DANN Beschickungsoffset null
# FALLS l null UND dl positiv DANN Beschickungsoffset positiv
# FALLS l positiv UND dl negativ DANN Beschickungsoffset null
# FALLS l positiv UND dl null DANN Beschickungsoffset positiv
# FALLS l positiv UND dl positiv DANN Beschickungsoffset positiv
# Negativ
N := -1.0
# Null
Z := 0
# Positiv
P := 1.0
Regel_Nr := [1, 2, 3; 4, 5, 6; 7, 8, 9]
Regeln := [N, N, Z; N, Z, P; N, P, P]
fx := 0.3
fy := 0.2
## Wahrheit des Fuzzy Feldes (MIN - Verknüpfung)
R1(λ, dλ) :=
    return f_N(λ) if f_N(λ) ≤ f_N(dλ)
    f_N(dλ) otherwise
R2(λ, dλ) :=
    return f_N(λ) if f_N(λ) ≤ f_Z(dλ)
    f_Z(dλ) otherwise
R3(λ, dλ) :=
    return f_N(λ) if f_N(λ) ≤ f_P(dλ)
    f_P(dλ) otherwise
R4(λ, dλ) :=
    return f_Z(λ) if f_Z(λ) ≤ f_N(dλ)
    f_N(dλ) otherwise
R5(λ, dλ) :=
    return f_Z(λ) if f_Z(λ) ≤ f_Z(dλ)
    f_Z(dλ) otherwise
R6(λ, dλ) :=
    return f_Z(λ) if f_Z(λ) ≤ f_P(dλ)
    f_P(dλ) otherwise
R7(λ, dλ) :=
    return f_P(λ) if f_P(λ) ≤ f_N(dλ)
    f_N(dλ) otherwise
R8(λ, dλ) :=
    return f_P(λ) if f_P(λ) ≤ f_Z(dλ)
    f_Z(dλ) otherwise
R9(λ, dλ) :=
    return f_P(λ) if f_P(λ) ≤ f_P(dλ)
    f_P(dλ) otherwise
# Bestimmung der Ausgangsgrösse
AN(λ, dλ) :=
    S ← 0
    S ← S + R1(λ, dλ) if Regeln[0, 0] == N
    S ← S + R2(λ, dλ) if Regeln[0, 1] == N
    S ← S + R3(λ, dλ) if Regeln[0, 2] == N
    S ← S + R4(λ, dλ) if Regeln[1, 0] == N
    S ← S + R5(λ, dλ) if Regeln[1, 1] == N
    S ← S + R6(λ, dλ) if Regeln[1, 2] == N
    S ← S + R7(λ, dλ) if Regeln[2, 0] == N
    S ← S + R8(λ, dλ) if Regeln[2, 1] == N
    S ← S + R9(λ, dλ) if Regeln[2, 2] == N
    return S
AZ(λ, dλ) :=
    S ← 0
    S ← S + R1(λ, dλ) if Regeln[0, 0] == Z
    S ← S + R2(λ, dλ) if Regeln[0, 1] == Z
    S ← S + R3(λ, dλ) if Regeln[0, 2] == Z
    S ← S + R4(λ, dλ) if Regeln[1, 0] == Z
    S ← S + R5(λ, dλ) if Regeln[1, 1] == Z
    S ← S + R6(λ, dλ) if Regeln[1, 2] == Z
    S ← S + R7(λ, dλ) if Regeln[2, 0] == Z
    S ← S + R8(λ, dλ) if Regeln[2, 1] == Z
    S ← S + R9(λ, dλ) if Regeln[2, 2] == Z
    return S
AP(λ, dλ) :=
    S ← 0
    S ← S + R1(λ, dλ) if Regeln[0, 0] == P
    S ← S + R2(λ, dλ) if Regeln[0, 1] == P
    S ← S + R3(λ, dλ) if Regeln[0, 2] == P
    S ← S + R4(λ, dλ) if Regeln[1, 0] == P
    S ← S + R5(λ, dλ) if Regeln[1, 1] == P
    S ← S + R6(λ, dλ) if Regeln[1, 2] == P
    S ← S + R7(λ, dλ) if Regeln[2, 0] == P
    S ← S + R8(λ, dλ) if Regeln[2, 1] == P
    S ← S + R9(λ, dλ) if Regeln[2, 2] == P
    return S
Gewichtung(λ, dλ) := [R1(λ, dλ), R2(λ, dλ), R3(λ, dλ); R4(λ, dλ), R5(λ, dλ), R6(λ, dλ); R7(λ, dλ), R8(λ, dλ), R9(λ, dλ)]
Gewichtung(fx, fy) = [0, 0, 0; 0, 0.7, 0.2; 0, 0.3, 0.2]
AN(fx, fy) = 0
AZ(fx, fy) = 0.7
AP(fx, fy) = 0.7
# Punktbestimmung
Punkt(AN, AZ, AP) :=
    dN ← AZ - AN
    dP ← AP - AZ
    return (dN + dP)/(AN + AZ + AP)
# Darstellung im 3D Raum
f(λ, dλ) := Punkt(AN(λ, dλ), AZ(λ, dλ), AP(λ, dλ))
f(fx, fy) = 0.5
FuzzyLogic_3D := CreateMesh(f, -1, 1, -1, 1, 30)
## Parametrierung Fuzzy Logic Regler
# [component: inputs FuzzyLogic_3D]
# [area: Normierung]
## Normierung der Eingangsgrössen für den Fuzzy Regler
# Bereich für die Normierung von -1 bis +1
Normierung(x, Minus, Null, Plus) :=
    Norm ← LinGl_1(x, Minus, -1, Null, 0) if (x ≥ Minus) and (x ≤ Null)
    Norm ← LinGl_1(x, Null, 0, Plus, 1) if (x ≥ Null) and (x ≤ Plus)
    Norm ← -1 if x < Minus
    Norm ← 0 if x == Null
    Norm ← 1 if x > Plus
    return Norm
Minus := 0.5
Null := 2
Plus := 5
Norm_x(x) := Normierung(x, Minus, Null, Plus)
Norm_y(x) := Normierung(x, Minus, Null, Plus)
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# [area: Fuzzy Logic Advanced]
## Fuzzy Logic Advanced
## Parametrisierung der Gewichtungsfunktion
x_1N := -1.0
x_2N := -1.0
x_3N := -1.0
x_4N := 0
x_1Z := -1
x_2Z := 0
x_3Z := 0
x_4Z := 1
x_1P := 0
x_2P := 1.0
x_3P := 1.0
x_4P := 1.0
f_N(x) := Kennlinie(x, x_1N, x_2N, x_3N, x_4N)
f_Z(x) := Kennlinie(x, x_1Z, x_2Z, x_3Z, x_4Z)
f_P(x) := Kennlinie(x, x_1P, x_2P, x_3P, x_4P)
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## Linguistik Regeln
## Beschickungsregelung
# Regelsatz Beispiel
# FALLS x negativ UND y negativ DANN z negativ
# FALLS x negativ UND y null DANN z negativ
# FALLS x negativ UND y positiv DANN z null
# FALLS x null UND y negativ DANN z negativ
# FALLS x null UND y null DANN z null
# FALLS x null UND y positiv DANN z positiv
# FALLS x positiv UND y negativ DANN z null
# FALLS x positiv UND y null DANN z positiv
# FALLS x positiv UND y positiv DANN z positiv
# Negativ
N := -1.0
# Null
Z := 0
# Positiv
P := 1.0
Regel_Nr := [1, 2, 3; 4, 5, 6; 7, 8, 9]
Regeln ≡ [N, N, Z; N, Z, P; N, P, P]  # disabled
Regeln := [P, N, P; N, Z, P; N, P, P]
fx := 0.3
fy := 0.2
## Wahrheit des Fuzzy Feldes (MIN - Verknüpfung)
R1(λ, dλ) :=
    return f_N(λ) if f_N(λ) ≤ f_N(dλ)
    f_N(dλ) otherwise
R2(λ, dλ) :=
    return f_N(λ) if f_N(λ) ≤ f_Z(dλ)
    f_Z(dλ) otherwise
R3(λ, dλ) :=
    return f_N(λ) if f_N(λ) ≤ f_P(dλ)
    f_P(dλ) otherwise
R4(λ, dλ) :=
    return f_Z(λ) if f_Z(λ) ≤ f_N(dλ)
    f_N(dλ) otherwise
R5(λ, dλ) :=
    return f_Z(λ) if f_Z(λ) ≤ f_Z(dλ)
    f_Z(dλ) otherwise
R6(λ, dλ) :=
    return f_Z(λ) if f_Z(λ) ≤ f_P(dλ)
    f_P(dλ) otherwise
R7(λ, dλ) :=
    return f_P(λ) if f_P(λ) ≤ f_N(dλ)
    f_N(dλ) otherwise
R8(λ, dλ) :=
    return f_P(λ) if f_P(λ) ≤ f_Z(dλ)
    f_Z(dλ) otherwise
R9(λ, dλ) :=
    return f_P(λ) if f_P(λ) ≤ f_P(dλ)
    f_P(dλ) otherwise
# Bestimmung der Ausgangsgrösse
AN(λ, dλ) :=
    S ← 0
    S ← S + R1(λ, dλ) if Regeln[0, 0] == N
    S ← S + R2(λ, dλ) if Regeln[0, 1] == N
    S ← S + R3(λ, dλ) if Regeln[0, 2] == N
    S ← S + R4(λ, dλ) if Regeln[1, 0] == N
    S ← S + R5(λ, dλ) if Regeln[1, 1] == N
    S ← S + R6(λ, dλ) if Regeln[1, 2] == N
    S ← S + R7(λ, dλ) if Regeln[2, 0] == N
    S ← S + R8(λ, dλ) if Regeln[2, 1] == N
    S ← S + R9(λ, dλ) if Regeln[2, 2] == N
    return S
AZ(λ, dλ) :=
    S ← 0
    S ← S + R1(λ, dλ) if Regeln[0, 0] == Z
    S ← S + R2(λ, dλ) if Regeln[0, 1] == Z
    S ← S + R3(λ, dλ) if Regeln[0, 2] == Z
    S ← S + R4(λ, dλ) if Regeln[1, 0] == Z
    S ← S + R5(λ, dλ) if Regeln[1, 1] == Z
    S ← S + R6(λ, dλ) if Regeln[1, 2] == Z
    S ← S + R7(λ, dλ) if Regeln[2, 0] == Z
    S ← S + R8(λ, dλ) if Regeln[2, 1] == Z
    S ← S + R9(λ, dλ) if Regeln[2, 2] == Z
    return S
AP(λ, dλ) :=
    S ← 0
    S ← S + R1(λ, dλ) if Regeln[0, 0] == P
    S ← S + R2(λ, dλ) if Regeln[0, 1] == P
    S ← S + R3(λ, dλ) if Regeln[0, 2] == P
    S ← S + R4(λ, dλ) if Regeln[1, 0] == P
    S ← S + R5(λ, dλ) if Regeln[1, 1] == P
    S ← S + R6(λ, dλ) if Regeln[1, 2] == P
    S ← S + R7(λ, dλ) if Regeln[2, 0] == P
    S ← S + R8(λ, dλ) if Regeln[2, 1] == P
    S ← S + R9(λ, dλ) if Regeln[2, 2] == P
    return S
Gewichtung(λ, dλ) := [R1(λ, dλ), R2(λ, dλ), R3(λ, dλ); R4(λ, dλ), R5(λ, dλ), R6(λ, dλ); R7(λ, dλ), R8(λ, dλ), R9(λ, dλ)]
Gewichtung(fx, fy) = [0, 0, 0; 0, 0.7, 0.2; 0, 0.3, 0.2]
AN(fx, fy) = 0
AZ(fx, fy) = 0.7
AP(fx, fy) = 0.7
# Punktbestimmung
Punkt(AN, AZ, AP) :=
    dN ← AZ - AN
    dP ← AP - AZ
    return (dN + dP)/(AN + AZ + AP)
# Darstellung im 3D Raum
f(x, y) := Punkt(AN(Norm_x(x), Norm_y(y)), AZ(Norm_x(x), Norm_y(y)), AP(Norm_x(x), Norm_y(y)))
f(fx, fy) = 1
f(2, 1.1) = -0.6
FuzzyLogic_3D := CreateMesh(f, 1, 3, 1, 3)
## Parametrierung Fuzzy Logic Regler
# [component: inputs FuzzyLogic_3D]
# [component: inputs FuzzyLogic_3D]
# [area: Beschränkung Abgas]
## Reglerinschränkung in Abhängigkeit des Abgaswertes
# Bei der Leistungsregulierung Abgastemperatur mitberücksichtigen
x_1A := 0.3
x_2A := 0.8
f_A(x) := -1*Kennlinie(x, x_1A, x_2A, 1, 1)
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