# Regelalgorithmen im Zeitbereich
# Beschreibung der Grundfunktionen als Differenzengleichungen für die Umsetzung in einen programmierbaren Rechner (SPS) mit diskretem Zeitverhalten.
SP := 2^10  # Sampling Points
τe := 16  # Zeitfenster [s]
Δτ := τe/SP = 0.015625
Δτ = 0.015625  # Auflösung [s]
τ := 0 .. SP  # Laufvariable
# Schrittfunktion
step(t, ts_1, te_1, ts_2, te_2) :=
    out ← 0
    if (t ≥ ts_1) and (t ≤ te_1)
        out ← 1
    else
        if (t ≥ ts_2) and (t ≤ te_2)
            out ← 1
        else
            out ← 0
    return out
t_s1 := 0 + Δτ
t_e1 := 4
t_s2 := 8
t_e2 := 12  # ToDo: Umsetzung mit Heavysidefunktion
x_e[τ] := step(τ*Δτ, t_s1, t_e1, t_s2, t_e2)
# [plot: x_e[τ] vs τ*Δτ]
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# PID bzw. PIDT1
PID(K_R, T_N, T_V, T_Vz, x) :=
    "Nullsetzen der Variablen"
    proportional ← 0
    integral ← 0
    dx ← 0
    dy ← 0
    for n ∈ 0 .. rows(x)
        y[n] ← 0
        differential[n] ← 0
    "Bestimmung der Schrittantwort"
    for n ∈ 1 .. (rows(x) - 1)
        "P-Anteil"
        proportional ← K_R*x[n]
        "I-Anteil"
        integral ← integral + K_R/T_N*x[n]*Δτ
        "DT1-Anteil"
        dx ← K_R*T_V*(x_e[n] - x_e[n - 1])
        dy ← dx/T_Vz
        differential[n] ← differential[n - 1] - differential[n - 1]/T_Vz*Δτ + dy
        "Summation der Teilfaktoren"
        y[n] ← proportional + integral + differential[n]
    return y
K_R := 1.0
T_N := 1
T_V := 1
T_Vz := 0.25
y := PID(K_R, T_N, T_V, T_Vz, x_e)
# [plot: x_e[τ], y[τ] vs τ*Δτ]
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# Vorsteuerung
# Koordinaten aus dem Kennlinienfeld => experimentelle Ermittlung
x_P := [0; 10; 20; 30; 40; 50; 60; 70; 80; 90]
y_P := [9; 31; 44; 55; 65; 72; 79; 83; 87; 90]
n := length(x_P) = 10
x_Pmin := min(x_P) = 0
y_Pmin := min(y_P) = 9
x_Pmax := max(x_P) = 90
y_Pmax := max(y_P) = 90
linInt(x) :=
    y_int ← -1.0
    m ← 0
    q ← 0
    i ← 0
    if x ≤ x_Pmin
        y_int ← y_Pmin
    else if x ≥ x_Pmax
        y_int ← y_Pmax
    else
        while i < (n - 1)
            if (x > x_P[i]) and (x ≤ x_P[i + 1])
                m ← (y_P[i + 1] - y_P[i])/(x_P[i + 1] - x_P[i])
                q ← y_P[i] - m*x_P[i]
                y_int ← m*x + q
                i ← n
            i ← i + 1
    return y_int
x := x_Pmin - 1, x_Pmin - 0.9 .. x_Pmax + 1
# [plot: y_P, linInt(x) vs x_P, x]
# PT2
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PT2(K, ζ, ω, x_e) :=
    dx ← 0
    dy ← 0
    for n ∈ 0 .. rows(x_e)
        x[n] ← 0
        y[n] ← 0
    for n ∈ 1 .. (rows(x_e) - 1)
        dy ← Δτ*ω*x[n - 1]
        dx ← Δτ*ω*(K*x_e[n] - y[n - 1] - 2*ζ*x[n - 1])
        x[n] ← x[n - 1] + dx
        y[n] ← y[n - 1] + dy
    return y
K := 1
ζ := 0.43
ω := 3.72
y := PT2(K, ζ, ω, x_e)
# [plot: x_e[τ], y[τ] vs τ*Δτ]
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2*ζ/ω = 0.231183
(1/ω^2) = 0.0722627
# Totzeit
TOTZEIT(K, T_t, x_e) :=
    n_t ← floor(T_t/Δτ)
    for n ∈ 0 .. rows(x_e)
        y[n] ← 0
    for n ∈ n_t .. (rows(x_e) - 1)
        y[n] ← K*x_e[n - n_t]
    return y
K := 0.5
T_t := 0.8
y := TOTZEIT(K, T_t, x_e)
# [plot: x_e[τ], y[τ] vs τ*Δτ]
# PT1
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PT1(K_p, T_1, x_e) :=
    for n ∈ 0 .. rows(x_e)
        x_a[n] ← 0
    for n ∈ 1 .. (rows(x_e) - 1)
        x_a[n] ← x_a[n - 1] + (-x_a[n - 1] + K_p*x_e[n])/T_1*Δτ
    return x_a
K_p := 1.0
T_1 := 0.3
x_a := PT1(K_p, T_1, x_e)
# [plot: x_e[τ], x_a[τ] vs τ*Δτ]
# PI
PI(K_R, T_N, x_e) :=
    summe ← 0
    for n ∈ 0 .. rows(x_e)
        x_a[n] ← 0
    for n ∈ 1 .. (rows(x_e) - 1)
        summe ← summe + K_R/T_N*(x_e[n]*Δτ)
        x_a[n] ← K_R*x_e[n] + summe
    return x_a
x_a(t) == K_R*(x_e(t) + 1/T_N*integral(x_e(t), t))  # disabled
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K_R := 1.0
T_N := 2
x_a := PI(K_R, T_N, x_e)
# [plot: x_e[τ], x_a[τ] vs τ*Δτ]
# DT1
DT1(K_D, T, x_e) :=
    dx_a ← 0
    dx_e ← 0
    for n ∈ 0 .. rows(x_e)
        x_a[n] ← 0
    for n ∈ 1 .. (rows(x_e) - 1)
        dx_e ← K_D*(x_e[n] - x_e[n - 1])
        dx_a ← x_a[n - 1]/T*Δτ
        x_a[n] ← x_a[n - 1] + dx_e - dx_a
    return x_a
x_a(t) + T*d/dt(x_a(t)) == K*d/dt(x_e(t))  # disabled
K_D := 3
T := 0.25
x_a := DT1(K_D, T, x_e)
# [plot: x_e[τ], x_a[τ] vs τ*Δτ]
# PDT1
PDT1(K_P, K_D, T, x_e) :=
    x_a ← 0
    x_a1 ← 0
    x_a2 ← 0
    dx_e ← 0
    dx_a ← 0
    for n ∈ 0 .. rows(x_e)
        x_a[n] ← 0
        x_a1[n] ← 0
        x_a2[n] ← 0
    for n ∈ 1 .. (rows(x_e) - 1)
        dx_e1 ← K_D*(x_e[n] - x_e[n - 1])
        dx_a1 ← x_a1[n - 1]/T*Δτ
        x_a1[n] ← x_a1[n - 1] + dx_e1 - dx_a1
        x_a2[n] ← K_P*x_e[n]
        x_a[n] ← x_a1[n] + x_a2[n]
    return x_a
K_P := 1.0
K_D := 3
T := 0.5
x_a := PDT1(K_P, K_D, T, x_e)
# [plot: x_e[τ], x_a[τ] vs τ*Δτ]
